# Error Propagation Sandbox
# Let's consider a simple formula from our days in Mrs. Gentry's Geometry Class.
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# Our volume is a function of two
# dependant variables:  Height and Radius.  (Notice also that the Radius is Squared).  [Actually, we can count three if we presume that we are rounding pi to values they felt safe to let use in Middle School or Junior High.]
# Let's draft a formula for Volume:
V(r, h) := π*r^2*h
# Let's also presume that we have an uncertainty our measurements of r and h.
# We'll derive that error by assuming that we are using a simple ruler that is accurate to a quarter of an inch.  (And I'll throw in a rounding error of PI as 3.14).
Δh := (0.25/2) in
Δr := (0.25/2) in
Δπ := |3.14 - π| = 0.00159265
# If follows, that if we have uncertainty in our measured values height and radius, those errors will "propagagte" into our volume calculations.  Now to quantify these this propogation we are going to use the Swiss Army Knife of Numerical Methods:  The Taylor Series:
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# The good news is that we are only going to be working as far as the "first-order" term.  We will assume here that "x" above is the real value of our dependant variable.  While "a" is our estimate.  Our measurement error is (x-a).  With a little bit of "Algebra Fu" and only using the zero order and first order terms (and ignoring signs...
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# Δf
# Now at this point, you may notice that we have more than one dependant variable.  Not to worry, there is a Taylor Expansion for that too.  And not to worry again, since as with the single variable case, we won't use all of it!
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# [the subscripts on the "f's" are the derivatives by variable (fx is the first derivative of f by x, fxy is the second derivative of f by x and y, etc...)]
# Before you panic, not to worry again... we are only taking the zero and first order terms of the taylor series.  (And for higher numbers of variables the first two terms  on the Right Hand Side follow the same model as the above case).
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# So let's go back to our original volume problem (and throwing out some values for h & r...
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# We get the below values for the base-value for Volume and our potential error!
# where r = 10 inches and h = 5 inches
V(r, h) := π*r^2*h
ΔV(r, h) := d/dr(V(r, h)*Δr) + d/dh(V(r, h)*Δh)
V(10 in, 5 in) = 1570.8 in^3
ΔV(10 in, 5 in) = 78.5398 in^3
# On your own, do this by hand in your notebook by hand.  Also can you add pi?  (You'll need to patch the volume formula and use the "symbol" value of Pi rather than the constant.) .
# Now let's consider how our Volume's error propagation changes with its dependant values and also relative to the Volume itself.  We call the latter, "Sensitivity."
S(r, h) := ΔV(r, h)/V(r, h)
S(10 in, 5 in) = 0.05
# We can also graph this and for simplicity we are removing any units as they can be problematic with some of Mathcad's graphing features.
Δh := 0.125
Δr := 0.125
ΔV(r, h) := d/dr(V(r, h)*Δr) + d/dh(V(r, h)*Δh)
S(r, h) := ΔV(r, h)/V(r, h)
# [plot: V(r, 5) vs r]
# [plot: V(10, hh) vs hh]
ΔV(10, 3) = 62.8319
# [contour plot: V(r, hh)]
# [contour plot: ΔV(r, hh)]
# [contour plot: S(r, hh)]
# You can find graph methods in Chapter 8
# Notice that the overall sensitivity is greatest at the low values of measurements of r and h
