# Forward-in-Time Calculations of Exponential Growth/Decay
X_o := 1  # Initial value of Xo
a := 1  # Growth Decay Factor (units of increase of X per time step)
# Relationship in Calculus Form (I'm using the bold comparative equals sign as an equation editor)
d/dt(X(t)) == a*X(t)
F(X) := a*X  # Here is a re-write of the above so I have the "forcings" that are used on X
X_true(a, t) := X_o*e^(a*t)  # This is the true calculus-Dif-Eq solution
# Now let's program this using the Euler's Method....
# .... Here is the theory...  ... and some pseudocode...
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# And here I am making it work.  I'm doing it a little differently, though so that we can put things in terms of our delta-X and make the code more flexible and PORTABLE (never reinvent a wheel if you don' t have to! ... unless it's for college credit... If you know what I mean*)
X_euler(t_f, f_x, x_o, Δt) :=
    x_output ← x_o
    N ← t_f/Δt
    if N > 0
        for i ∈ 1 .. N
            x_output ← x_output + f_x(x_output)*Δt
    return x_output
# <- This line is new...
# <- This a "patch" for when N=0 that I added
# <- Functions written above your "code" can be referenced by the code!  This will be important in our root-finding code.
# And now we let'r rip!
t_0 := 0
t_f := 1.5
Δt := 0.5
X_euler(t_f, F, X_o, Δt) = 3.375
# And here is the real answer
X_euler(t_f, F, X_o, 0.25) = 3.8147
X_true(a, t_f) = 4.48169
X_euler(t_f, F, X_o, 0.05) = 4.32194
# So like the pi formula, the smaller the increment, the more crunching you need to do...  but the more accurate the solution
X_euler(t_f, F, X_o, 0.00001) = 4.48166
# * and I think you do...
# We can also demonstrate this for a time series though Mathcad can be rather difficult when plotting it.
# First let's create a generic time series for a delta-ts of from 0.5 and 0.05
t_0.50 := 0, 0.50 .. 1.50
t_0.25 := 0, 0.25 .. 1.50
t_0.10 := 0, 0.10 .. 1.50
t_0.05 := 0, 0.05 .. 1.50
# [plot: X_euler(t_0.50, F, X_o, 0.5), X_euler(t_0.25, F, X_o, 0.25), X_euler(t_0.10, F, X_o, 0.10), X_euler(t_0.05, F, X_o, 0.05), X_true(a, time) vs t_0.50, t_0.25, t_0.10, t_0.05, time]
# Your take-away point on this is as with the pi case, the smaller the increment over which you integrate a solution (we call marching forward in time "integrating [over time]"), the more accurate your result with be.
#
# But this is at a price.  It takes more steps to crunch through for a smaller delta-t.  And that is an increase in expense especually when you are modeling large systems like watersheds and groundwater fields.
#
# You CAN cut back on the number of timesteps AND retain accuracy.  For those of you in Differential Equations there is a method called Runge Kutta that will achieve this.....
# ..... and with that people who are in or have had Dif-Eq's can move forward.
# ...For those of you in Differential Equations...
# There are some resources in Mathcad that help with solving differential equations.
#
# Some can be used without solve blocks others need them...
# Here is an example for the Solve Block.
solve block
    # guess values
    this_space_is_blank := 0
    # constraints
    d/dt(X(t)) == a*X(t)
    X(t_0) == 1
    # solver
    X_odesolve := odesolve(X(t), t_f)
end solve block
# <- We're not using this but it's not as pretty if you just leave it blank (try deleting it and see)
# <- Here we define a function X (not the same as what is on "the outside" of hte solve block).
# <- We want to give it an initial condition
# <- And this seals the deal with an ODE solver
# Xodesolve is an abstraction kept deep in Mathcad with is a little frustrating... Your prof hates "black boxes."
X_odesolve = [Function: <Closure_1>b__c]
X_odesolve → "Symbolic result is an invalid Prime expression"
# You need to graph it to see
# [plot: X_true(a, t), X_odesolve(t) vs t]
# The ODE is producing a solution that is valid between the time values requested in odesolve (0 and tf)
#
# For a more discrete that will give you the output for each timestep.  There is a function called rkfixed...
# The setup for this one is similar to what we did above with some small [passive agressively subtle] changes.
# You need to have a start and end time and total number of time steps...
t_0 := 0
t_f := 1.5
Δt := 0.5
N := (t_f - t_0)/Δt = 3
# You also need to state your function according to the value you're going to solve and the value overwhcih you integrate (whcih for us is "time")...  these are the forcings that are beating on your value of X(t)
f_rk(t, X) := a*X
X_rk := rkfixed(X_o, t_0, t_f, N, f_rk)  # Then just provide the initial condition (for us, Xo)
# The result is a time array in the "down" and across the resulting variables as listed your "function"
X_rk = [0, 1; 0.5, 1.64844; 1, 2.71735; 1.5, 4.47938]
time_rk05 := X_rk[:, 0]
X_rkoft05 := X_rk[:, 1]  # You can split them up with the <> operator
# [plot: X_euler(t_0.50, F, X_o, 0.5), X_rkoft05, X_true(a, time) vs t_0.50, time_rk05, time]
# Now let's compare the two methods using the same time step of 0.5!
