# Let’s consider a population train in Mathcad following the Stella Systems Model Sketch below.
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# μ | α | ω
# Y | M | O
β
Y + M + O
φ
# For our prognostic variables (In Stella, we call them “Stocks”)
# Y : immature young population
# M : mature population that can bear young
# O : older population that cannot bear young
#
# These prognostic variables are controlled by the following rules
# ϕ : 50% of the population is female (capable of bearing young)
# β : the birth rate per female is typically 1 birth per 2 years
# μ : The typical period spent in youth is 10 years
# α : The typical period spent as a mature adult is 10 years
# ω : the typical period spent in old age is 5 years
φ := 0.5  # female fraction
β := 1/2  # 2 births per female per year
μ := 1/10  # typically, 1 maturation event per youth per 10 years
α := 1/10  # typically, 1 maturation event per mature adult per 10 years
ω := 1/5  # typically, 1 death event per aged adult per 5 years
# Putting these equations together we get the following....
d/dt(Y) == φ*β*M - μ*Y
d/dt(M) == μ*Y - α*M
d/dt(O) == α*M - ω*O
solve block
    # guess values
    This_space_is_blank := 0  # error: Unknown error: ode%_missing%_endpoint%_argument.
    # constraints
    d/dt(Y(t)) == φ*β*M(t) - μ*Y(t)
    Y(0) == 0
    d/dt(M(t)) == μ*Y(t) - α*M(t)
    M(0) == 0
    d/dt(O(t)) == α*M(t) - ω*O(t)
    O(0) == 0
    # solver
    YMO_odesolve := odesolve([Y(t); M(t)])
end solve block
