# Indexing starts at 0
table  # each column defines a variable
    θ | τ
    0.698132 | 0.188224
    0.959931 | 0.209138
    1.134464 | 0.230052
    1.570796 | 0.250965
    1.919862 | 0.313707
end table
# To the left is a dataset from Kau's NR-MFC 06.03's Example 1 where we are playing with mousetraps...
#
# Let's use this case to explore basic linear regression theory and execution
# [plot: τ vs θ]
# First, let's plot these two fields against each other...
#
# It clearly makes a nice linear relationship.
#
# Let's now pull some basic stats...
θ_mean := mean(θ) = 1.25664
s_θ := Stdev(θ) = 0.488224
τ_mean := mean(τ) = 0.238417
s_τ := Stdev(τ) = 0.0481472
N := rows(θ) = 5
CI95_θ := qt(1 - 0.05/2, N - 1)*s_θ/sqrt(N) = 0.606211  # We will be creating a function to fit the dependent variable τ to independant variable θ
CI95_τ := qt(1 - 0.05/2, N - 1)*s_τ/sqrt(N) = 0.0597826
τ_θ(θ) := a_0 + a_1*θ  # error: This variable is undefined. Check that the label is set correctly.
# Remember the secret to linear regression.  We want to minimize the error between our regression equation results and our original values of tau.  We express it as a summed square of the residuals (SSR) or Sr
S_r(a_0, a_1) := sum(((a_0 + a_1*θ) - τ)^2)
# [contour plot: S_r(A1, A2)]
# Here we are plotting Sr vs a1 and a2 in a contour plot
#
# Somewhere is the blue is the minimum Sr.
#
# Since we went to college we can be clever and use some Calc-1-Fu.  We want to find the place in the Sr(a1,a2) function where the gradient is zero
# There are a few clever ways to do this in Matchad.  If you take the derivative
# (slope or gradient) of the Sr(a1,a2) and solve it using the symbolic arrow...
S_r0(A_0, A_1) := d/dA_0(S_r(A_0, A_1)) → 10*A_0 + 12.56637*A_1 - 2.384172
S_r1(A_0, A_1) := d/dA_1(S_r(A_0, A_1)) → 12.56637*A_0 + 17.6982691083*A_1 - 3.1792758515
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# So we have two simulaneous equations
# (just like with Mrs Mercer in Junior High School Algebra Class)
# And here we want to solve for the values of a1 and a0 when both derivatives (the total gradient of our "error bowl") is zero
#
# Two equations.  Two unknowns.  We can solve this system!
#
# In Mathcad there are a couple cool ways to solve these two equations for given that BOTH derivatives are equal to zero (i.e., where the Sr(a0,a1) function creates the bottom of the "bowl.")
# Here's one...  (We'll have fun with more methods later in the course!)
A := [S_r0(A_0, A_1); S_r1(A_0, A_1)] solve, A_0, A_1 → [0.117665148988, 0.0960914337328]
# Hypoethetically if this worked...  Our slope and intercept would be..
# y-Intercept:
A[:, 0] = [0.117665]
# Slope:
A[:, 1] = [0.0960914]
# Let's double-check this against our available intrinsic functions in Matchad (and Excel) and also using the equations in Mathcad.
#
# Since this is an open hand case and we are replicating the NR-MFC text we have an additonal point on which to bench our results!
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# y-Intercept:
A[:, 0] = [0.117665]
# Slope:
A[:, 1] = [0.0960914]
# And now the rest is on you!  Try these formulas by hand as well as the intrinsic functions...
