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# Consider the following System of Susceptable (S), Infected (I), Recovered (R) and Dead (F) populations being exposed to a given contagion.
i := 1/4
# Infection Rate (chance of infection upon exposure per unit time)
# one in four in this example
γ := 1/2
# Recovery Rate (chance of recovery upon exposure per unit time)
# also 2 days typically needed to recover
p := 0  # Fracton of people who know more about immunity than Jenny McCarthy and Andrew Wakefield and got their %$&#@ Flu Shot!
κ := 6  # Number of contacts that risk infection per infected person per day
ω := 0.1  # Death Rate (fraction of infected people who expire per day)
R_o := i*κ/(γ + ω) = 2.5  # The R-naught factor: the number of people that one sick person effects
p_o := 1 - 1/R_o = 0.6  # Nominal Herd Immunity Fraction to contain an outbreak
# This system combines to create a classic equation in epidemiology called the Kermack-McKendrick Equations
dS(t, S, I, R) := -κ*i*(1 - p)/(S(t) + I(t) + R(t))*S(t)*I(t)  # Uninfected People (lots of unit-Fu here)
β == κ*i*(1 - p)/(S(t) + I(t) + R(t))  # This is Beta from the classic K-McK equations
dI(t, S, I, R) := κ*i*(1 - p)/(S(t) + I(t) + R(t))*S(t)*I(t) - γ*I(t) - ω*I(t)  # Infected People
dR(t, S, I, R) := γ*I(t)  # Recovered (and Aquired-Immune) people
dF(t, S, I, R) := γ*ω*I(t)  # Fatalities
# This setup requries a "short" game rather than a long multigenerational simulation
t_0 := 0
t_f := 30
# Let's use a solve-block for this
solve block
    # guess values
    this_space_is_blank := 0
    # constraints
    d/dt(S(t)) + κ*i*(1 - p)/(S(t) + I(t) + R(t))*S(t)*I(t) == 0
    S(0) == 998
    I(0) == 2
    R(0) == 0
    d/dt(I(t)) - (κ*i*(1 - p)/(S(t) + I(t) + R(t))*S(t)*I(t) - γ*I(t)) == 0
    F(0) == 0
    d/dt(R(t)) - γ*I(t) == 0
    d/dt(F(t)) - ω*I(t) == 0
    # solver
    SIRF_odesolve := odesolve([S(t); I(t); R(t); F(t)], t_f)
end solve block
# Extract our participating variables
Susceptable_ode := SIRF_odesolve[0]
Recovered_ode := SIRF_odesolve[2]
Infected_ode := SIRF_odesolve[1]
Fatalities_ode := SIRF_odesolve[3]
# [plot: Susceptable_ode(t), Infected_ode(t), Recovered_ode(t), Fatalities_ode(t) vs t]
# Here is a the plot of the system
# If you want to try a Runge-Kutta solution you must pu thte equations in an array system...
SIRF := [998; 2; 0; 0]  # Initialziation of our four categories
D_SIRF(t, SIRF) := [
    -κ*i*(1 - p)/(SIRF[0] + SIRF[1] + SIRF[2])*(SIRF[0]*SIRF[1]);
    κ*i*(1 - p)/(SIRF[0] + SIRF[1] + SIRF[2])*(SIRF[0]*SIRF[1]) - γ*SIRF[1] - ω*SIRF[1];
    γ*SIRF[1];
    ω*SIRF[1]
]
# Which gives us a total number of time steps (N)
# We'll need a time step
Δt := 0.2
N := 30/Δt = 150
SIRF_rk := rkfixed(SIRF, t_0, t_f, N, D_SIRF)  # Here is the Runge-Kutta solver
# And now we extract our variables (time is the first one)
time := SIRF_rk[:, 0]
Susceptable_RK := SIRF_rk[:, 1]
Recovered_RK := SIRF_rk[:, 3]
Infected_RK := SIRF_rk[:, 2]
Fatalities_RK := SIRF_rk[:, 4]
# [plot: Susceptable_RK, Infected_RK, Recovered_RK, Fatalities_RK vs time]
