# For the following Sales Modeling Framework, we will show that this naturally-created system is acutally a variant of the classical Logisical Equation....
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# Daily Unit Sales per Sales Person is
f(S) == E_x - E_x*S/S_x
# Let's start by "snowballing" or accruing the terms
# We will first do a fast run through the "retirement" process
(d/dt(S)) == -S*w  # That's pretty straight forward.
# retire
# The fun comes with the hiring loop.  I did this by just walking in the "forwad" direction around the loop starting at the Sales "Stock/Reservoir" and stoping at the personnel budget just before we encumber our existing staff into the hiring pool.
personnel_budget == S*(E_x - E_x*S/S_x)*d*p*o
# Then we get our budget surplus by removing the dollars required support the existing personel.
encumbered_existing_personnel_budget == S*l
budget_surplus_for_new_hires == personnel_budget - encumbered_existing_personnel_budget
budget_surplus_for_new_hires == S*(E_x - E_x*S/S_x)*d*p*o - S*l
# We get our total net hires by dividing by the unit salary
