# When working with advanced programming on some coursework you will need to some of the more advanced features in Mathcad.
#
# You can explore some of this Chapter 13 of the Mathcad text.  Today we are going to explore time dependent functions similar to what we did with the Great Lakes case.
#
# Let’s start with a classic case: the Leaky Bucket Problem.  (The Great Lakes Case was actually a series of Leaking Buckets).
#
# Consider a bucket with a hole at the bottom.
# - We pour water into the bucket at a constant rate.
# - The water flows out at a rate that includes the size of the hole and also the weight of the water in the bucket.
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# We can make a simple inflow-outflow budget to represent the volume (V) of the bucket (we can assume that the bucket is an upright cylinder)
d/dt(V) == q_in - q_out
# qin can be set to a constant for now.
#
# qout is represented by the following equation you may recognize it as Torricelli's Law.
q_out == sqrt(2*g*h)*A_h
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π*r_b^2
# Where g is gravity, h is the height of water in the budget, and Ah is (the area of the hole).
#
# We can if we have a radius of the bucket (rb) and radius of the hole (rh) we can fill in the equation...
r_b
h(V, r_b) := V/(π*r_b^2)
V_h(h, r_b) := π*r_b^2*h
d/dt(V) == q_in - q_out
h(V, r_b) := V/(π*r_b^2)
A_h(r_h) := π*r_h^2
q_in
r_h
# Also using symbolic cartoons (we do this in Systems Modeling) we can sketch out our
# system's relationships ------------------------------->
g
sqrt(2*g*h)*A_h
π*r_h^2
# If we just apply a little Algebra-Fu (and we'll use Mathcad to do the work because... at Mathcad...), we can create a working equation to represent our system.  (A close eye will show that I'm cheating with bold equals and a text equal... right now we're just making the equation...
d/dt(V) == q_in - q_out
d/dt(V)
# =
q_in - sqrt(2*g*h(V, r_b))*A_h(r_h) simplify → q_in - r_h^2*sqrt(2*π*V*g/r_b^2)
# I like to keep my equations organized with my independent values separated from any constants so I am going to do some very basic algebra-fu to the right-hand-side of the equation
d/dt(V(t)) == q_in - r_h^2/r_b*sqrt(2*π*g)*V(t)^(1/2)
# Stripping things down, this gives a general form of
d/dt(V(t)) == c_1 - c_2*V(t)^(1/2)
# Depending on your Math Prof, you may be asked to write it like this:
d/dt(V(t)) - q_in + r_h^2/r_b*sqrt(2*π*g)*V(t)^(1/2) == 0
# In any respect you now have a time-dependent differential equation
# So let's solve a classic Differential Equations Problem.
#
# Let's assume that an empty bucket is 15 inches high, 12 inches in diameter and hole is half-an-inch in diameter.  Let's start filling the bucket at a rate of 10 gal/min.
r_h := 0.5*in/2
r_b := 12*in/2
h_b := 15 in
g := g = 32.174 ft/s^2
q_in := 10 gal/min
# So for today, let's ask this:
# - At what volume does the bucket's inflow = outflow?
# - Will the bucket overflow. (Hint, the answer will be yes because otherwise we will have to stop having fun)?
# - If it does overflow... when will it spill over?
# So how do we attack this problem?  Note that we are using a mixture of units so some of our ways to go after this problem will be off limits.
# 1) Get the equilibrium [Steady State] Volume of between the qin and qout.
# If we put our system together neatly we have the following formula from above.
#
# Notice that I have writen it as a "root equation".  So good, this should be in our confort zone.  Let's use a solve block!
d/dt(V(t)) == q_in - r_h^2/r_b*sqrt(2*π*g)*V(t)^(1/2)  # where
d/dt(V(t)) == 0
solve block
    # guess values
    V := 0 gal
    r_b := 12*in/2
    q_in := 10 gal/min
    r_h := 0.5*in/2
    # constraints
    0 == q_in - r_h^2*sqrt(2*π*V*g/r_b^2)
    # solver
    V_eq := find(V) = 24.3773 gal
    # First Guess for V
    # our other
    # parameters
    # Root Equation valid
    # when dVdt(t) == 0
    # And we close the deal
end solve block
# 2) Is that bucket going to overflow?
# That should be easy... what's the bucket capacity?
V_h(h_b, r_b) = 7.34398 gal
# And again, our equilibrium capacity where qin=qout?
V_eq = 24.3773 gal
(V_h(h_b, r_b) > V_eq) = 0
# for logical [boolean] operators, 1=true, 0=false[
(7.344 gal > 24.377 gal) = 0
# Yes, it is going to overflow...
# 3) WHEN does it overflow?
# Now it gets fun:  We are going to need our time-dependent relationship for V(t)
d/dt(V(t)) == q_in - r_h^2/r_b*sqrt(2*π*g)*V(t)^(1/2)
# This is a non-linear ordinary differential equation.  Solving it by hand is a nasty affair, but we are living in the amazing futuristic 21st century and while we don't have the flying cars we were promised we DO have Mathcad.
#
# There are a couple functions that will do this for us but the easist one is going to be
# the ODESOLVE() function.  We can use it in a solve block as in the example below.
#
# We WILL need to know a good guess for when it overflows.  Since it overflows at 7.344 gal, and it's filling at 10 gal per minute, accounting for the hole, let's take our guessing range out to 1.5 minutes.  We can always change it if we've over/underestimated.  Don't overshoot too far though.
solve block
    # guess values
    t_0 := 0 min
    t_f := 1.5 min
    r_b := 12*in/2
    q_in := 10 gal/min
    r_h := 0.5*in/2
    # constraints
    d/dt(V(t)) - q_in + r_h^2/r_b*sqrt(2*π*g)*V(t)^(1/2) == 0
    V(t_0) == 0*gal
    # solver
    v := odesolve(V(t), t_f)
    # You don't really need these items here but if you don't use the "guess value" part of the solve block can get really big and look messy
    # We need our differential equation...
    # ...and a known boundary condition for a given time
    # (we're starting with an empty bucket so the volume is 0 at t=t0)
    # For ODESOLVE(), the arguments are the variable for which you want to solve (the first argument), and the final time extent starting from zero.
end solve block
# I'm explorting to the newly made complex function"v")
# Unfortunately if you want to look at v(t), Mathcad won't oblige.
# But v(t)'s behavior is embedded in the object.
v(t) → "Symbolic result is an invalid Prime expression"
# But we CAN access the contents of v(t) by ...
v(60*sec) = 6.3827 gal  # ...Involing it like any other function
# ...Plotting it...
# we'll need to give it a period to plot through
t_plot := 0 s, 10 s .. 90 s
# [plot: v(t_plot), V_h(h_b, r_b) (gal) vs t_plot (min)]
# Mop Level
# v(t)
# Looks like it's time for clean up on aisle 3 at about 1 min,15 sec
# ...and... as a traditional solve block!
solve block
    # guess values
    t := 0 s
    # constraints
    v(t) == V_h(h_b, r_b)
    # solver
    t_spill := find(t) = 72.2927 sec
    # (notice I'm using just setting my logical test to be true when we reach the volumn of a full bucket)
end solve block
# Bucket should spill over at 1 minute, and 12 seconds
# And now to our next step:  Modeling
# We can apply this equation to a more brute force approach to representing our systems.
# The method below is Euler's Method.  It works as follows and it should look familiar to you.
# Our Volume Rate of change as a function fo Volume.
dVdt(V) := q_in - r_h^2/r_b*sqrt(2*π*g)*V^(1/2)
# And a function that should give you a case of Déjà-Fu... uh..  Vu.
V_euler(dVdt, V_0, t_0, t_f, Δt) :=
    N ← (t_f - t_0)/Δt + 1
    V_out ← V_0
    t ← t_0
    for n ∈ 2 .. N
        t ← t + Δt
        V_out ← V_out + dVdt(V_out)*Δt
    return V_out
v(72*sec) = 7.32196 gal
V_euler(dVdt, 0 gal, 0*sec, 72*sec, 0.5*sec) = 7.33734 gal
V_euler(dVdt, 0 gal, 0*sec, 72*sec, 6*sec) = 7.52823 gal
V_euler(dVdt, 0 gal, 0*sec, 72*sec, 1*sec) = 7.35329 gal
V_euler(dVdt, 0 gal, 0*sec, 72*sec, 8*sec) = 7.60459 gal
V_euler(dVdt, 0 gal, 0*sec, 72*sec, 2*sec) = 7.38622 gal
V_euler(dVdt, 0 gal, 0*sec, 72*sec, 9*sec) = 7.64402 gal
V_euler(dVdt, 0 gal, 0*sec, 72*sec, 3*sec) = 7.42027 gal
V_euler(dVdt, 0 gal, 0*sec, 72*sec, 12*sec) = 7.76723 gal
V_euler(dVdt, 0 gal, 0*sec, 72*sec, 4*sec) = 7.45534 gal
V_euler(dVdt, 0 gal, 0*sec, 72*sec, 18*sec) = 8.03553 gal
# As with our PI pseudocode, the more increments we use the more accurate the solution
# This is the method we will use in our next section where we will explore the interaction of several interacting "stocks," or "variables,"
#
# ... or as we will explore:
#
# sick, healthy and recovered people
