# Worksheet setting: ORIGIN = 1
# Roots & Zeros Sandbox:
# Solving Non-Linear Single-Variable Equations
# Example #1: Danger to yourself and others (Univ Physics 211 example)
# You toss a rock into the air with an initial height above the ground of z0 with a given velocity (vo).  Gravity pulls it down with an accelleration of g=-9.8 m s-2 (or 32 ft/s2)
#
# The classic Physics formula is
z(t, g, z_o, v_o) := z_o + v_o*t - 1/2*g*t^2
g := 9.8  # m s-2
z_o := 10  # m
v_o := 10  # m s-1
z_target := 2  # m
# Warning!  When playing with symbolic arrows for solving these root equations, take the units off your numbers!  The above units are text boxes
# When will it land on your foot or on your head?  (where z = 0 for your foot, and z=2 m in some of our fantasies... )
# This is a classic quadratic equation or a "polynomial" or "algebraic" equation.
# While very generic, if have to solve for eigenvalues in structures, Diff Eqs and other applications of eigenvalues, you'll find yourself with the same overall structure.
# [plot: z(t_plot, g, z_o, v_o) vs t_plot]
# Original formula, z(t,g,zo,vo)
# In most cases you will want to plot out your original function.  This will give you the lay of the land so that you can attack the problem.
#
# Here we see that we have a classic parabolic shape (we could guess that from the equation) and luckilly it does pass through our desired value of 2 m.
#
# But when (what value of t) specifically?
#
# To better lock down the acutall target solutiuon in on our root value(s) of t, we will want to convert this into a "root-style" equation...
# m
# s
bisect(x_lo, x_hi, ε_target) :=
    i ← 0
    x_out ← (x_hi + x_lo)/2
    x_old ← x_hi
    while (error(x_old, x_out) > ε_target)
        x_old ← x_out
        if (f(x_out)*f(x_lo) < 0)
            x_hi ← x_out
        else
            x_lo ← x_out
        x_out ← (x_hi + x_lo)/2
        i ← i + 1
    [x_out; error(x_out, x_old); i]  # error: This variable is undefined. Check that the label is set correctly.
# To get the root equation, no matter how trivial or scary the original equation, the approach is always the same...
#
# Take the original equation, and slam ALL terms to one side of the equal sign.  It doesn't matter whcih side.  The result will be a "new" function so we should use a new label designator for it.  If there are no "f"'s in the original equation, f(x) or here, f(t), is the traditional symbol to lead off the new function...
# Root Equation Formula f(t)
# And our solution for where our object crosses our target height will be where f(t) = 0.
f(t) := z_o + v_o*t - 1/2*g*t^2 - z_target
# [plot: f(t) vs t]
# Let's make a new graph of our root function.  Now we are able to see that it crosses the t-axis (where f(t) = 0) between 2.5 and 3.0 using the available tick marks that I can see.
# These two values will represent our first guess(es).
#
# Don't let any OCD get best of you when selecting brackets.  Let the methods for getting the roots do the heavy lifting.
# m
# s
# In Matchad, one of the easier functions to use with universal appeal is the root() function.  It takes into account a bracket range which allows you to zero in on a solution without your solution "wandering" to values that you have already dismissed as non-viable.  In this case, such a misdirection would send it to a negative time value  and we don't want that!
t_rootFunc := root(f(t), t, 2.5, 3) = 2.65561  # s
# We can test this by inserting that value of t into our original function or root function...
f(t_rootFunc) = 0  # m  # You should be satisfied if your answer is effectively zero within measurement or numerical precision.
# Remember with Matchad you have about 15 or so floating point places so a value of 10^(-14ish to -15ish) is basically a defacto zero error.
# Let's now try the Solver Arrow.  Be aware this doesn't always work.  You'll see that happen in the Green-Ampt example that follows,
# Here we ave two values, the negative time (already dismissed) and a value close to our result from root (and graph!).  So we have an answer that is "Benching" with (matching) a previous approach.  That's also good.
f(t) solve, t → [-0.614793928491; 2.65561025502]  # m
# Note that if you play with the options under the Symbolic Area on the ribbon, you can refine your answer, and even bracket them...
t_solveArrow := f(t) solve, t, assume, t > 0 → 2.65561025502  # s
t_solveArrow := f(t) solve, t, assume, t == RealRange(2.5, 3) → 2.65561025502  # s
# Always test your results...
f(t_solveArrow) = 0  # m
# Another satisfactory solution!
# Since this is a polynomial expression we can use one more intrinsic function in Mathcad.  This is the polyroots() function...  (You can't do this with a transcendental function)
# First we need to get the coefficients before each member of the polynomial expression.  The "coeffs" arrow function will do this and sort them from the lowest-to-highest coefficient order, as shown here.
C := f(t) coeffs → [8; 10; -4.9]
f(t) → 10*t + (-4.9*t^2) + 8
t_polyroot := polyroots(C) = [-0.614794; 2.65561]  # s
# Grabbing the more likely candidate...  (The positive one!)
f(t_polyroot[1]) = 8.88178e-16
# m
# Now on to programming.  As we noted before, you can slide the "f" into the argument list so you can reuse the function after creating it.  Here are three of our functions for root detection.  First let's declare our programs (don't forget to also have an error function!)
error(a, b) := |a - b|
bisect(f, x_lo, x_hi, ε_target) :=
    i ← 0
    x_out ← (x_hi + x_lo)/2
    x_old ← x_hi
    while (error(x_old, x_out) > ε_target)
        x_old ← x_out
        if (f(x_out)*f(x_lo) < 0)
            x_hi ← x_out
        else
            x_lo ← x_out
        x_out ← (x_hi + x_lo)/2
        i ← i + 1
    return [x_out; error(x_out, x_old); i]
newton(f, x_fg, ε_target) :=
    i ← 0
    x_old ← x_fg
    x_out ← x_old - f(x_old)/f'(x_old)
    while (error(x_old, x_out) > ε_target)
        x_old ← x_out
        x_out ← x_old - f(x_old)/f'(x_old)
        i ← i + 1
    return [x_out; error(x_out, x_old); i]
secant(f, x_fg1, x_fg2, ε_target) :=
    i ← 0
    x_old ← x_fg1
    x_m2 ← x_fg2
    x_m1 ← x_fg1
    x_out ← x_m1 - f(x_m1)*(x_m1 - x_m2)/(f(x_m1) - f(x_m2))
    while (error(x_old, x_out) > ε_target)
        x_old ← x_out
        x_m2 ← x_m1
        x_m1 ← x_out
        x_out ← x_m1 - f(x_m1)*(x_m1 - x_m2)/(f(x_m1) - f(x_m2))
        i ← i + 1
    return [x_out; error(x_out, x_old); i]
falsepos(f, x_lo, x_hi, ε_target) :=
    i ← 0
    x_old ← x_lo
    x_out ← (x_hi*f(x_lo) - x_lo*f(x_hi))/(f(x_lo) - f(x_hi))
    while (error(x_old, x_out) > ε_target)
        x_old ← x_out
        if (f(x_out)*f(x_lo) < 0)
            x_hi ← x_out
        else
            x_lo ← x_out
        x_out ← (x_hi*f(x_lo) - x_lo*f(x_hi))/(f(x_lo) - f(x_hi))
        i ← i + 1
    return [x_out; error(x_out, x_old); i]
# You can borrow the "Bisection" program and insert the False Position equation build the False Position Method Program.
# Now let's test them using the same brackets and first guesses from above.  For our tolerance, we can presume that we have a really good yardstick with markings to the nearest millimeter.  Why length?  That's becasue our units for the f(t) equation is for length (take a closer look at the f(t) equation from above)!.
ε_tolerance := 0.001/2 = 0.0005  # m
# Bisection Method | And here we're using f(t) to get the error...
# s
t_b := bisect(f, 2.5, 3, ε_tolerance) = [2.65576; 0.000488281; 9]  # m
f(t_b[1]) = -0.00242732
# False Position (my function for this is hiding in the margin)
# s
t_fp := falsepos(f, 2.5, 3, ε_tolerance) = [2.6556; 0.000127823; 3]  # m
f(t_fp[1]) = 0.00021571
# Secant Method
# s
t_s := secant(f, 2.5, 3, ε_tolerance) = [2.65561; 3.70048e-6; 3]  # m
f(t_s[1]) = 1.4104e-8
# s | s
secant(f, 2.5, 2.6, ε_tolerance) = [2.65561; 0.000141067; 2]  # m
secant(f, 2.95, 3, ε_tolerance) = [2.65561; 1.67078e-5; 3]  # m
# Newton-Raphson Method
# s
t_n := newton(f, 2.5, ε_tolerance) = [2.65561; 2.03722e-5; 2]  # m
f(t_n[1]) = -2.03362e-9
# s
t_n := newton(f, 3, ε_tolerance) = [2.65561; 0.000269444; 2]  # m
f(t_n[1]) = -3.5574e-7
# You also can have some fun with the Newton method and explore how fast those the equation converges on the FIRST iteration.
t_newton1 := 2.5 - f(2.5)/f'(2.5) = 2.66379  # s
t_newton1 := 3 - f(3)/f'(3) = 2.68557  # s
# This was pretty fast for both...
#
# Why?  Hint:  Take a close look at the slope near our brackets in the root equation plot above....  The more linear the slope, the faster it will converge!
# Now let's look at a new Mathcad structure, the Solve Block
# This structure is a partially isolated section of Matchad "code" that has a number of applications from solviong roots to solving complex differential equations.
#
# The solve block is separated into three regions.
solve block
    # guess values
    z_o := 10 m
    z_target := 2 m
    v_o := 10 m*s^-1
    g := 9.8 m*s^-2
    t := 0.5 hr
    # constraints
    z_o + v_o*t - 1/2*g*t^2 - z_target == 0
    t > 0
    # solver
    t_block := find(t) = 2.65561 s
    # And here is the fiirst guess.  Be aware that you may have to experiment with this!
    # I prefer to explicitly restate my constraining equations in my solve blocks so that everything is there for a reviewer to see.  You can use the plain old f(z) = 0 but that will require the reviewer to scroll up and that can be annoying from their perspective.
    #
    # Also if you want to use units, but weren't doing it before the block, you WILL want to restate the equation.  Same thing if you are using new constants.
    # And here I'm setting an additional to further limit my answer to a positive value
    # The find values will provide the answer for a given function in the constraint section.
    # And if you need to test the result, you can put the equation below the "Solver Area" but keep it in the solve block so you can make use of the constants used in the "Guess Area"
    z_o + v_o*t_block - 1/2*g*t_block^2 - z_target = 0 m
end solve block
# These are my constants (notice also that you can use units here - since these values will not be seen outside of the solve block to mess up other features like the solve arrows!)
# The first block is where you will want to keep constants that you don't want to mix with other parts of your sheet.  What goes in this part of the block, STAYS in this part of the block, and is not seen outside of it by other equations or processes.
#
# Also important here for many Solve Block applications is the "first guess" of the value(s) that you are trying to solve.  Your first guess may influence your solution so you may need to experiment with this one if you get an answer that isn't what's in your intuitive ballpark.
# The center section is for your constraints.  These are the conditions for which your desired soliution should be valid.  So for your root probem, your equation should use the conditional equal sign to zero.  You can also include any other constraints to ensure that your result fits specific requirements, like time being positive as we are doing here.
# The last section is the "Solver" where you get your desired answer.  For roots and other applications like solving simultaneous equations, you can use the find() function.
# This final section will also let you export the value out of the solve block using the :=
t_block = 2.65561 s
# For an example of how I comment these (and hint, hint, how I would like to see you comment on these structures), scroll down for the Green-Ampt example.
# Example #2: Hydrology - Infiltration of water into the soil
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# Consider a "front" of rainwater penetrating downward into the soil.  (The term is acutally called the "Infiltration Front" or "Wetting Front".)
#
# The depth and rate of infiltration can be expressed by the Green-Ampt equation where the infiltration depth as a function of the soil properties is....
depth := K_s*t + ψ_s*ΔΘ*ln(1 + depth/(ψ_s*ΔΘ))  # error: This variable is undefined. Check that the label is set correctly.
# The Classic Green-Ampt Equations
infiltration_rate(depth) := K_s*(ψ_s*ΔΘ/depth + 1)  # error: This variable is undefined. Check that the label is set correctly.
# Where for a Silt Loam Soil using soil property parameters estimated by
# Clapp and Hornberger (1978)
K_s := 3.467*10^-5  # m s-1  # Silt Loam Saturated Hydraulic Conductivity
ψ_s := 0.218  # m  # Silt Loam Saturated Matric ("Suction") Potential
Θ_s := 0.435  # Silt Loam Saturation Water Content
# Let's assume that the initial soil water content beneath the front (pre-rain) is
Θ := 0.4  # Ambient Unsaturated Soil Water Content
ΔΘ := (Θ_s - Θ) = 0.035  # Wetting Front Deficit
# After 10 minutes, let's estimate the the depth to which the water infulrated and estimate the infiltration rate
t := 10*60 = 600  # s
# To calculate the results of these two equations (normally we're really shooting for the infiltration rate), we want to first get the depth at time (t).
#
# The depth equation on first glance is one that we can't solve with traditional Algebra-Fu.  Both equations qualify as non-polynomial, non-algebraic and therefore is a "transcendental" equation.
#
# (The second equation will just be an old-school "plug-n-chug" once we get the depth of the wetting front)
#
# It is also an equation that typifies why we use the root method to solve these equations.
#
# To solve this system, we first do what we do to all candidate root equatios.  Send evetything to one side of the equal sign.  (Once agian, we can use "f" as our symbol)
K_s*t = 0.020802
ψ_s*ΔΘ = 0.00763
ln(1 + .035/(ψ_s*ΔΘ)) = 1.72047
depth := K_s*t + ψ_s*ΔΘ*ln(1 + depth/(ψ_s*ΔΘ))  # error: This variable is undefined. Check that the label is set correctly.
f(depth) := K_s*t + ψ_s*ΔΘ*ln(1 + depth/(ψ_s*ΔΘ)) - depth
f(.035) = -0.00107081
# This time to we can't make a reasonable plot of the first depth equation, but we CAN make the a plot of our root equation.
# [plot: f(depth) vs depth]
# Close inspection shows that at the far left end of our plot, we're running into that problem with the natural log part of the equation.  That left side is hitting an asymptope.  And the other side of that asymptope is an complex numnber with an imaginary component!
# Our target value is between 3 and 4 cm
# m
# m
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# So let's solve this using brackets of 3 cm and 4 cm
# Here is our root() function solution...
d_rootFunc := root(f(d), d, 0.03, 0.04) = 0.0336899  # m
f(d_rootFunc) = 1.11673e-6  # Notice that the error here is small but bigger than our earlier case but still small enough for our purposes.
# This error is basically down to a micron!
# As I warned you, the solve arrow does not provide a working solution here.  It gets the negative root of the system but can't seem to recognize our 3.4 cm solution.
f(d) solve, d → -0.00744167254294  # m
f(d) solve, d, assume, d == real → -0.00744167254294  # m
f(d) solve, d, assume, d > 0 →  # error: No solution was found.
f(d) solve, d, assume, d == RealRange(0.03, 0.04) →  # error
# Indeed, I got desperate and even tried creating program variant of our root function to force the matter
g(d) :=
    if d > 0
        g ← K_s*t + ψ_s*ΔΘ*ln(1 + d/(ψ_s*ΔΘ)) - d
    else
        g ← 10000
    return g
g(d) solve, d, assume, d == RealRange(0.03, 0.04) →  # error: Unable to evaluate a conditional expression.
# The solve arrow doesn't work with conditional expressions :-(
# Honestly, we've stumped the prof here...
# Now for the code...  Once again, our root dimensions are "Length."  And let's have our units now calibrated for centimeters.  (We're digging in dirt right now)
ε_tolerance := 0.01/2 = 0.005  # m
# When we apply these functions to our brackets and first guesses.
# Since we're working in dirt, I'm going to use wide brackets...  (from surface to half a meter)
# Bisection Method | And here we're using f(d) to get the error...
# m
d_b := bisect(f, 0.0, 0.5, ε_tolerance) = [0.0351562; 0.00390625; 6]  # m
f(d_b[1]) = -0.00119915
# False Position (still hidden)
# m
d_fp := falsepos(f, 0.0, 0.5, ε_tolerance) = [0.0333747; 0.00173733; 2]  # m
f(d_fp[1]) = 0.000257888
# Secant Method
# m
d_s := secant(f, 0.0, 0.5, ε_tolerance) = [0.0336886; 0.000195254; 3]  # m
f(d_s[1]) = 2.19032e-6
# m | m
secant(f, 0.0, 0.1, ε_tolerance) = [0.0336195; 0.00318358; 2]  # m
secant(f, 0.4, 0.5, ε_tolerance) = [0.0337277; 0.00139741; 2]  # m
# Newton-Raphson Method
# m
d_n := newton(f, 0, ε_tolerance) = [0.0336913; 0.000117662; 4]  # m
f(d_n[1]) = -3.08158e-8
# m
d_n := newton(f, 0.5, ε_tolerance) = [0.0336915; 0.00027774; 2]  # m
f(d_n[1]) = -1.7082e-7
# And for fun, and teachable moments, let's try our original backets to see how far
d_newton1 := 0 - f(0)/f'(0) = 4.03194e10  # m
d_newton1 := 0.5 - f(0.5)/f'(0.5) = 0.0460064  # m
# EEK!  Look at the one with 0!  let's look at the denominator!
# Since the slope is shallow, it sends the answer WELL away from our desired root.
f'(0) = -5.1593e-13
# Now let's try our solve block approach.
# Note the heavy commenting and use of units!
solve block
    # guess values
    K_s := 3.467*10^-5 m*s^-1
    ψ_s := 21.8*cm
    Θ_s := 0.435
    Θ := 0.400
    ΔΘ := Θ_s - Θ
    t := 10 min
    d := 0.01 cm
    # constraints
    K_s*t + ψ_s*ΔΘ*ln(1 + d/(ψ_s*ΔΘ)) - d == 0
    d > 0
    # solver
    d_block := find(d) = 0.0336913 m
    # Ambient Unsaturated Soil Water Content
    # Wetting Front Deficit
    # Time into infiltration process
    # First-Guess for depth penetration of Wetting Front
    # Green-Ampt Equation
    # Set all valid depths to be above zero (depth points downward)
    # Solver for depth
    # Testing the solution - it should be a value of zero...
    K_s*t + ψ_s*ΔΘ*ln(1 + d_block/(ψ_s*ΔΘ)) - d_block = 0 m
    # And finally get that infiltration rate
    infiltration_rate_at_time_t := K_s*(ψ_s*ΔΘ/d_block + 1) = 0.25513 cm/min
end solve block
# Silt Loam Saturated Hydraulic Conductivity
# Silt Loam Saturated Matric ("Suction") Potential
# Silt Loam Saturation Water Content
