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# Taking Our Great Lakes Transport Problem and putting it in Mathcad....
# Our Transport Rates | Our Local Chloride Contributions
Q_SH := 67
Q_MH := 36
Q_HE := 161
q_S := 180
q_M := 710
q_H := 740
Q_EO := 182
Q_OO := 212
q_E := 3850
q_O := 4720
# Our Steady-State Solution Matricies
# (c is just for show)
Q := [
    -Q_SH, 0, 0, 0, 0;
    0, -Q_MH, 0, 0, 0;
    Q_SH, Q_MH, -Q_HE, 0, 0;
    0, 0, Q_HE, -Q_EO, 0;
    0, 0, 0, Q_EO, -Q_OO
]
c == [c_S; c_M; c_H; c_E; c_O]
q := -[q_S; q_M; q_H; q_E; q_O]
c_matrix := Q^-1*q = [2.68657; 19.7222; 10.1242; 30.1099; 48.1132]  # And our steady state solution
# Now let's set things up a Solve Block or Solve Arrow Approach...
# I start by listing my equations as part of my documentation.  I am using the "bold" comparative equal sign here to improve the look and feel of the sheet
# And here is our steady state solution using a solve block... "root-style"
solve block
    # guess values
    c_S := 0
    c_M := 0
    c_H := 0
    c_E := 0
    c_O := 0
    # constraints
    0 == q_S - Q_SH*c_S
    0 == q_M - Q_MH*c_M
    0 == q_H + Q_SH*c_S + Q_MH*c_M - Q_HE*c_H
    0 == q_E + Q_HE*c_H - Q_EO*c_E
    0 == q_O + Q_EO*c_E - Q_OO*c_O
    # solver
    c_block := find(c_S, c_M, c_H, c_E, c_O) = [2.68657; 19.7222; 10.1242; 30.1099; 48.1132]
end solve block
d/dt(c_S) == q_S - Q_SH*c_S
d/dt(c_M) == q_M - Q_MH*c_M
d/dt(c_H) == q_H + Q_SH*c_S + Q_MH*c_M - Q_HE*c_H
d/dt(c_E) == q_E + Q_HE*c_H - Q_EO*c_E
d/dt(c_O) == q_O + Q_EO*c_E - Q_OO*c_O
# And our steady state solution using a solve arrow... Also "root-style"
dCdt(c_S, c_M, c_H, c_E, c_O) := [
    q_S - Q_SH*c_S;
    q_M - Q_MH*c_M;
    q_H + Q_SH*c_S + Q_MH*c_M - Q_HE*c_H;
    q_E + Q_HE*c_H - Q_EO*c_E;
    q_O + Q_EO*c_E - Q_OO*c_O
]
c_arrow := dCdt(c_S, c_M, c_H, c_E, c_O) solve, c_S, c_M, c_H, c_E, c_O → [180/67, 355/18, 1630/161, 2740/91, 2550/53]
# Since I don't arrays going lengthwise,  I can use the transpose of my answer to make it better looking
transpose(c_arrow) = [2.68657; 19.7222; 10.1242; 30.1099; 48.1132]
# And there you go!  We have demonstrated three ways to solve a simulatneous system of equations...
#
# Finally you can test your answer by plugging things back into your original equation form.  If all works out, you should have zero (or almost zero) for all values...
Q*c_matrix - q = [2.84217e-14; 0; 2.27374e-13; -9.09495e-13; 9.09495e-13]
# Now for an intermission.
#
# If you have had Diff-Eqs the next page will show you how to work through an example where we take this system of equations and use them to form a dynamic solution that changes over time.
#
# Once again, the idea here is to show that this system will converge to a steady state solution eventually.  And that solution SHOULD be the same as your matrix solution.
#
# If you have not had Diff-Eqs, don't panic over it.  You may want to come back after surviving ODE.
# Now for those of you with Diff Eq under your belts, we can have some fun (and for those of you who are not....  Sooooooon.......).  You can find guidance here in Chapter 13 of the Mathcad Text
#
# Let's start by setting up a solve block to create a dynamic or "transient" (not a steady state) solution starting with empty values of "c" and taking forward in time up to a final time of "0.5" arbitrary units
t_final := 0.5
solve block
    # guess values
    This_Space_For_Rent := 0
    # constraints
    d/dt(c_S(t)) == q_S - Q_SH*c_S(t)
    d/dt(c_E(t)) == q_E + Q_HE*c_H(t) - Q_EO*c_E(t)
    c_S(0) == 0
    c_M(0) == 0
    d/dt(c_M(t)) == q_M - Q_MH*c_M(t)
    c_H(0) == 0
    d/dt(c_O(t)) == q_O + Q_EO*c_E(t) - Q_OO*c_O(t)
    c_E(0) == 0
    c_O(0) == 0
    d/dt(c_H(t)) == q_H + Q_SH*c_S(t) + Q_MH*c_M(t) - Q_HE*c_H(t)
    # solver
    c_odesolve := odesolve([c_S(t); c_M(t); c_H(t); c_E(t); c_O(t)], t_final)  # error: This is a premium feature. To use this and other premium features, please upgrade to a full license using the 'Upgrade' button.
    # <- This keeps this unused section small.
    # Here are our equations written "diff-eq" style and our initial conditons at time "0"
    # And here is our transient solution valid for a range between t = 0 and t_final
end solve block
# You can break them up for graphing and printing with the [ subscript method.
Superior := c_odesolve[0]
Michigan := c_odesolve[1]
Huron := c_odesolve[2]
Erie := c_odesolve[3]
Ontario := c_odesolve[4]
# [plot: Superior(t), Michigan(t), Huron(t), Erie(t), Ontario(t) vs t]
Superior(t_final) = 2.68657
Michigan(t_final) = 19.7222
Huron(t_final) = 10.1242
Erie(t_final) = 30.1099
Ontario(t_final) = 48.1132
c_matrix = [2.68657; 19.7222; 10.1242; 30.1099; 48.1132]
# And once again!  We have a bench once the time series steady out over time and we have a balanced system.
# Now let's step back to a more "interesting scenario".  Let's go back our five equations.
d/dt(c_S) == q_S - Q_SH*c_S
d/dt(c_M) == q_M - Q_MH*c_M
d/dt(c_O) == q_O + Q_EO*c_E - Q_OO*c_O
d/dt(c_H) == q_H + Q_SH*c_S + Q_MH*c_M - Q_HE*c_H
# In a steady state, the left-hand-sides (LHSs) of the equations will all be zero.
#
# However, let's throw a wrench in the mix.  In this case it's not quite a good example physically unless we go into extreme "Mysterious Unknown Force" ("MUF" - another Space 1999 joke) that typically plagues victims of endless science fiction shows....
#
# Let's assume that there is a Deus ex Machina force that requires all of total concentrations of c to be equal to 100 units.  For example there is ONLY 100 units available to the Lake System.
#
# We will implement it by adding a SIXTH equation.
c_total := 100.
c_totalB := sum(c_matrix) = 110.756
c_total == c_S + c_M + c_H + c_E + c_O
# SIX equations... FIVE unknowns.  This is new territory.  This is an OVERSOLVED equation.  We will not be able to exactly solve for this of c_total is not naturally the total of the balanced steady state values of c from earlier.
# But first, let's first set up our matrices.
Q_2 := [
    -Q_SH, 0, 0, 0, 0;
    0, -Q_MH, 0, 0, 0;
    Q_SH, Q_MH, -Q_HE, 0, 0;
    0, 0, Q_HE, -Q_EO, 0;
    0, 0, 0, Q_EO, -Q_OO;
    1, 1, 1, 1, 1
]
q_2_and_c_total := -[q_S; q_M; q_H; q_E; q_O; -c_total]
# That last line seems to break the "look and feel" of our equation system from 5 transport equations to 5 transport equation plus one mass balance equation.  With the exception that we are "oversolved" or "overclosed" that is not really a major issue.  An equation is an equation.
# Notice also that our New Q, Q2, is no longer square.  We won't be able to get a traditional inverse.  We must do something else.  This new structure is called a PSUEDOINVERSE
Q2_pseudo := (transpose(Q_2)*Q_2)^-1*transpose(Q_2)
Q2_pseudo = [
    -0.0149108, 2.06119e-5, 7.65833e-6, 4.76189e-6, 2.19966e-6, 0.000466327;
    3.8361e-5, -0.0277237, 2.00966e-5, 1.24959e-5, 5.77223e-6, 0.00122371;
    -0.00619333, -0.00618601, -0.00620183, 5.81393e-6, 2.68562e-6, 0.000569352;
    -0.00547696, -0.00546977, -0.00548532, -0.00548879, 2.63952e-6, 0.000559578;
    -0.00470123, -0.00469477, -0.00470873, -0.00471185, -0.00471461, 0.000502569
]
# We are still a non-square matrix but it will allow us to solve our system.
Q^-1 = [
    -0.0149254, 0, 0, 0, 0;
    0, -0.0277778, 0, 0, 0;
    -0.00621118, -0.00621118, -0.00621118, 0, 0;
    -0.00549451, -0.00549451, -0.00549451, -0.00549451, 0;
    -0.00471698, -0.00471698, -0.00471698, -0.00471698, -0.00471698
]
# And now we solve.
c_oversolved := Q2_pseudo*q_2_and_c_total = [2.68155; 19.7091; 10.1181; 30.1039; 48.1078]
# If we plug in our new values into our linear system to check if our answer creates all zeros (as it would if we were a neatly closed system...), we get the following....
# Here we should have values that are "near"
# zero but not quite getting there...  As with the Least Squares Method, this is a compromise to create a "least-bad" solution.
#
# Note that if you go up and change teh value for c_total to something closer to the balanced total of values, you will get a
Q_2*c_oversolved - q_2_and_c_total = [0.336063; 0.473846; 0.176057; 0.109471; 0.0505678; 10.7204]
# Now that our "Mysterious Unknown Regulatory Force" case is demonstrated, let's get a little more realistic.
#
# Let's fix the above case by still having a regulatory requirement that we reduce the total concentration in all lakes to a given amount.... For example, once again, 100 units.
#
# Our equatons stay the same but we can fix our problem.  We will lay the burden of balancing our regulatory requirement to the managers of Lake Erie in honor of a classic Saturday Night Live Sketch (Lake Erie is doing a lot better than in the past).  Lake Erie will need to change its concentrations to satisfy requirement.  This its q_E will have to be turned into a variable.  The larger equation system when written out root-style or diff-eq style may be similar as before.  But our matrix structure will change.  Our "C" matrix will now hold an extra value -- q_E.  While q_E's previous place in the q matrix will be set to zero.
Q_3 := [
    -Q_SH, 0, 0, 0, 0, 0;
    0, -Q_MH, 0, 0, 0, 0;
    Q_SH, Q_MH, -Q_HE, 0, 0, 0;
    0, 0, Q_HE, -Q_EO, 0, 1;
    0, 0, 0, Q_EO, -Q_OO, 0;
    1, 1, 1, 1, 1, 0
]
c_and_q_E == [c_S; c_M; c_H; c_E; c_O; q_E]
q_3_and_c_total := -[q_S; q_M; q_H; 0; q_O; -c_total]
c_and_q_E := Q_3^-1*q_3_and_c_total = [2.68657; 19.7222; 10.1242; 24.3223; 43.1446; 2796.67]
c_matrix = [2.68657; 19.7222; 10.1242; 30.1099; 48.1132]
c_and_q_E[5] - q_E = -1053.33  # Local Input Reduction of Chlorides
# And our loss in quality beverages is the Great Lake water qualitiy's gain.
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